# 1. Функция плотности альфа-распределения
f(x, α, β) := β/(x^2*(2*π)^(1/2))*e^(-1*(β/x - α)^2/2)
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# 2. Функция распределения
F(x, α, β) := integral(β/(x^2*(2*π)^(1/2))*e^(-1*(β/x - α)^2/2), x = 0 .. x)
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# 3. Начальные моменты
α1(α, β) := integral(x*f(x, α, β), x = 0 .. 10)
α2(α, β) := integral(x^2*f(x, α, β), x = 0 .. 10)
α3(α, β) := integral(x^3*f(x, α, β), x = 0 .. 10)
# 4. Математическое ожидание.
M1(α, β) := α1(α, β)
M1(3, 20) = 5.41591
M1(4, 40) = 4.2292
M1(5, 60) = 1.46521
M2(α, β) := β/α*(1 + 1/α^2)
M2(3, 20) = 7.40741
M2(4, 40) = 10.625
M2(5, 60) = 12.48
x := 0, 0.1 .. 30
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# 5. Мода
α := 3
β := 20
mo(x, α, β) := root(d/dX(f(X, α, β)), X, 4, 20)
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mo(0, 3, 20) = 5.61553
mo(0, 4, 40) = 8.98979
mo(0, 5, 60) = 11.1684
# 6. Медиана
root(F(x, 3, 20) - 1/2, x, 3, 20) = 6.66667
root(F(x, 4, 40) - 1/2, x, 4, 40) = 10
root(F(x, 5, 60) - 1/2, x, 5, 60) = 12
# 7. Дисперсия
D1(α, β) := α2(α, β) - α1(α, β)^2
D1(3, 20) = 7.47874
D1(4, 40) = 18.3632
D1(5, 60) = 11.4392
D2(α, β) := β^2/α^4*(1 + 8/α^2)
D2(3, 20) = 9.32785
D2(4, 40) = 9.375
D2(5, 60) = 7.6032
x := 2, 2.1 .. 5
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# 8. Среднеквадратичное отклонение
σ(α, β) := sqrt(D1(α, β))
σ(3, 20) = 2.73473
σ(4, 40) = 4.28524
σ(5, 60) = 3.38219
# 9. Коэффициент асимметрии
μ(α, β) := 2*α1(α, β)^3 - 3*α1(α, β)*α2(α, β) + α3(α, β)
S1(α, β) := μ(α, β)/σ(α, β)^3
x := 0, 0.1 .. 10
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