# 1. Функция плотности альфа-распределения
f(x, α, β) := β/(x^2*(2*π)^(1/2))*e^(-1*(β/x - α)^2/2)
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# 2. Функция распределения
F(x, α, β) := integral(β/(x^2*(2*π)^(1/2))*e^(-1*(β/x - α)^2/2), x = 0 .. x)
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# 3. Математическое ожидание.
α1(α, β) := integral(x*f(x, α, β), x = 0 .. 10)
α2(α, β) := integral(x^2*f(x, α, β), x = 0 .. 10)
# 4. Функциональные зависимости и параметры, полученные с помощью имитации Альфа распределения методом обратных функций.
n := 10000
i := 0 .. n - 1
a := 0
b := 1
y1 := runif(n, a, b)
y2 := sort(y1)
X1(i) := root(F(x, 6, 20) - y2[i], x, 0, 10)
X2(i) := root(F(x, 7, 25) - y2[i], x, 0, 10)
X3(i) := root(F(x, 8, 30) - y2[i], x, 0, 10)
x1[i] := X1(i)
x2[i] := X2(i)
x3[i] := X3(i)
gaps := 40
lower2 := floor(min(x2))
lower3 := floor(min(x3))
lower1 := floor(min(x1))
α := 6
β := 20
upper2 := ceil(max(x2))
upper3 := ceil(max(x3))
upper1 := ceil(max(x1))
gapLen2 := (upper2 - lower2)/gaps
gapLen3 := (upper3 - lower3)/gaps
gapLen1 := (upper1 - lower1)/gaps
M2 := sum(x1[i], i = 0 .. n - 1)/n
j := 0 .. gaps
j := 0 .. gaps
j := 0 .. gaps
M1 := α1(α, β)
int2[j] := lower2 + gapLen2*j
int3[j] := lower3 + gapLen3*j
int1[j] := lower1 + gapLen1*j
D1 := α2(α, β) - α1(α, β)^2
t2 := hist(int2, x2)/(n*gapLen2)
t3 := hist(int3, x3)/(n*gapLen3)
σ1 := sqrt(D1)
t1 := hist(int1, x1)/(n*gapLen1)
D2 := sum(x1[i]^2, i = 0 .. n - 1)/n - (sum(x1[i], i = 0 .. n - 1)/n)^2
int2 := int2 + gapLen2/2
int3 := int3 + gapLen3/2
int1 := int1 + gapLen1/2
σ2 := sqrt(D2)
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M1 = 3.43464
M2 = 3.44884
D1 = 0.399052
D2 = 0.422929
σ1 = 0.631706
σ2 = 0.65033
α := 7
β := 25
M2 := sum(x2[i], i = 0 .. n - 1)/n
M1 := α1(α, β)
D1 := α2(α, β) - α1(α, β)^2
σ1 := sqrt(D1)
D2 := sum(x2[i]^2, i = 0 .. n - 1)/n - (sum(x2[i], i = 0 .. n - 1)/n)^2
σ2 := sqrt(D2)
M1 = 3.64928
M2 = 3.6611
D1 = 0.312211
D2 = 0.328784
σ1 = 0.558759
σ2 = 0.573397
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α := 8
β := 30
M2 := sum(x3[i], i = 0 .. n - 1)/n
M1 := α1(α, β)
D1 := α2(α, β) - α1(α, β)^2
σ1 := sqrt(D1)
D2 := sum(x3[i]^2, i = 0 .. n - 1)/n - (sum(x3[i], i = 0 .. n - 1)/n)^2
σ2 := sqrt(D2)
M1 = 3.81158
M2 = 3.82185
D1 = 0.251606
D2 = 0.264228
σ1 = 0.501603
σ2 = 0.514031
S
