f(x, α, β) := β/(x^2*(2*π)^(1/2))*e^(-1*(β/x - α)^2/2)
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F(x, α, β) := integral(β/(x^2*(2*π)^(1/2))*e^(-1*(β/x - α)^2/2), x = 0 .. x)
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amount := 10000
interval := 0.2
i := 0 .. amount - 1
a := 0
b := 1
y1 := runif(amount, a, b)
y2 := sort(y1)
X1(i) := root(F(x, 6, 20) - y2[i], x, 0, 10)
X2(i) := root(F(x, 7, 25) - y2[i], x, 0, 10)
X3(i) := root(F(x, 8, 30) - y2[i], x, 0, 10)
x1[i] := X1(i)
x2[i] := X2(i)
x3[i] := X3(i)
N(t, X) :=
    i ← 0
    while X[i] < t
        i ← i + 1
    amount - i
Tmax1 := round(max(x1)/interval, 0) = 44
Tmax2 := round(max(x2)/interval, 0) = 38
Tmax3 := round(max(x3)/interval, 0) = 35
i1 := 0 .. Tmax1
i2 := 0 .. Tmax2
i3 := 0 .. Tmax3
T1[i1] := i1*interval
T2[i2] := i2*interval
T3[i3] := i3*interval
i1 := 0 .. Tmax1 - 1
i2 := 0 .. Tmax2 - 1
i3 := 0 .. Tmax3 - 1
P1[i1] := N(T1[i1], x1)/amount
P2[i2] := N(T2[i2], x2)/amount
P3[i3] := N(T3[i3], x3)/amount
P1[Tmax1] := 0
P2[Tmax2] := 0
P3[Tmax3] := 0
P(t, α, β) := 1 - F(t, α, β)
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Q1[i1] := (amount - N(T1[i1], x1))/amount
Q2[i2] := (amount - N(T2[i2], x2))/amount
Q3[i3] := (amount - N(T3[i3], x3))/amount
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i1 := 0 .. Tmax1 - 2
i2 := 0 .. Tmax2 - 2
i3 := 0 .. Tmax3 - 2
f1[i1] := (N(T1[i1], x1) - N(T1[i1] + interval, x1))/(amount*interval)
f2[i2] := (N(T2[i2], x2) - N(T2[i2] + interval, x2))/(amount*interval)
f3[i3] := (N(T3[i3], x3) - N(T3[i3] + interval, x3))/(amount*interval)
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I1[i1] := f1[i1]/P1[i1]
I2[i2] := f2[i2]/P2[i2]
I3[i3] := f3[i3]/P3[i3]
I(t, α, β) := f(t, α, β)/P(t, α, β)
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