## Модель Джелинского-Моранды
# 1. Генерация статистики
ORIGIN := 1
Given
n := 14
t := floor(rexp(n, 0.05))
t := sort(t)
t = [1; 2; 3; 7; 9; 10; 15; 15; 17; 29; 33; 34; 46; 47]
# 2. Решение системы уравнений и нахождение коэффициентов
E0 := 30
Kjm := 0.001
sum(1/(E0 - (i - 1)) - Kjm*t[i], i = 1 .. n) == 0
sum(1/Kjm - (E0 - i + 1)*t[i], i = 1 .. n) == 0
[Kjm1; E01] := Find(Kjm, E0) = [0.0116553; 14.0865]
Kjm := Kjm1 = 0.0116553  # оценка коэффициента Джелинского-Моранды
E0 := floor(E01) = 14  # оценка числа ошибок в ПО до начала тестирования
# 3. Расчет параметров модели
λnext := |Kjm1*(E01 - n)|
λnext = 0.00100781  # интенсивность отказов до следующей n+1-й ошибки
mnext := 1/λnext
mnext = 992.248  # средняя наработка до следующей n+1-й ошибки
tnext := t[n] + rnd(2)
Pnext := e^(-λnext*tnext)
Pnext = 0.95265  # вероятность безотказной работы (отсутствия следующего n+1-го отказа)
i := 1 .. n
λ[i] := Kjm*(E0 - (i - 1))
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m[i] := 1/λ[i]
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λ[i] = [0.163174; 0.151518; 0.139863; 0.128208; 0.116553; 0.104897; 0.0932421; 0.0815869; 0.0699316; 0.0582763; 0.0466211; 0.0349658; 0.0233105; 0.0116553]
m[i] = [6.12844; 6.59985; 7.14984; 7.79983; 8.57981; 9.53312; 10.7248; 12.2569; 14.2997; 17.1596; 21.4495; 28.5994; 42.8991; 85.7981]
P[i] := e^((-λ[i])*t[i])
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f[i] := λ[i]*P[i]
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f = [0.138607; 0.111907; 0.0919344; 0.0522583; 0.040828; 0.0367452; 0.0230247; 0.0239955; 0.0212994; 0.010753; 0.0100097; 0.0106497; 0.00797747; 0.00673933]
P = [0.849444; 0.738572; 0.657316; 0.407605; 0.350297; 0.350297; 0.246934; 0.294109; 0.304575; 0.184517; 0.214704; 0.304575; 0.342226; 0.578222]
